Z := 1.8
g1 := 1/(4*π)*Z^2*integral(integral(integral(integral(1/(Z^2 + (x1 - x2)*(x1 - x2) + (y1 - y2)*(y1 - y2)), x1 = -0.5 .. 0.5), x2 = -0.5 .. 0.5), y1 = -0.5 .. 0.5), y2 = -0.5 .. 0.5)
g1 = 0.0725656
ksi1 := Z/(2*π*1)*integral(integral(integral(integral(1/(Z^2 + (x1 - x2)*(x1 - x2) + (y1 - y2)*(y1 - y2))^(3/2), x1 = -0.5 .. 0.5), x2 = -0.5 .. 0.5), y1 = -0.5 .. 0.5), y2 = -0.5 .. 0.5)
ksi1 = 0.0428609
